########################################
#                                      #
# PNC deforming LAMMPS input script    #
#                                      #
########################################

# 5 nvt @600k after relaxation

# VARIABLES
variable fname index be4nvtlow
variable simname index nvtlowtemp
variable temperature index 200
variable damping index 20
variable runtimes index 12000000
#variable
#variable

# Initialization
units		real
boundary	p p p
atom_style	molecular
log 		${simname}.log
#read_data	${fname}.dat
read_restart	restart.${fname}.dat

# Dreiding potential information
neighbor	0.4 bin
neigh_modify	every 10 one 10000
bond_style      class2
bond_coeff	1 4.7 5.76525  0.0 2.882625 #kcal/mol
#bond_coeff	1 4.7 0.25ev 0.0 0.125ev

#special_bonds fene angle no dihedral no
special_bonds lj 0.0 1.0 1.0

#####equi1_pair.py data
include pairfile_no_soft
####equi1_pair.py complete

#####################################################
# Equilibration Stage 5 (NVT dynamics at 600 K after relaxation)
fix         1st all nvt temp ${temperature} ${temperature} ${damping} # higher the viscosity, lower damping
fix     3rd np move linear NULL 0 0 units box
fix   		4th all momentum 1 linear 1 1 1 angular
thermo_style	custom step temp press epair ebond vol pxx pyy pzz lx ly lz
thermo          10000
timestep	2
dump		1 all dcd  10000 ${simname}.dcd
reset_timestep  0
run		${runtimes}
unfix 1st
unfix 3rd
unfix 4th
write_restart 	restart.${simname}.dat

print "[>> All done! <<]"
